// COMSOL Multiphysics 5.4.0.225 model "c54-hologram-200k.mph"
// Outline of the model tree

Functions
  im1: Image | funcname = height; importedname = testrgb_COLORMAP_AUTUMN.png; filename = C:\Users\PYM\Desktop\LJQ\testrgb_COLORMAP_AUTUMN.png; xmin = -24.8; xmax = 24.8; ymin = -24.8; ymax = 24.8; scaling = manual; manualexpr = g*255/60*0.5; argunit = mm

Geometry
  geom1 "Geometry 1" (3D, length unit mm)
    ps1: ParametricSurface
      parmin1 = -24.8
      parmax1 = 24.8
      parmin2 = -24.8
      parmax2 = 24.8
      coord = {s1, s2, height(s1,s2)}
      maxknots = 100
    blk1: Block | pos = {0, 0, 2.5}; base = center; size = {49.6, 49.6, 5}
    pard2: PartitionDomains | domain = blk1(1) domains 1; partitionwith = faces; face = ps1(1) boundaries 1
    del2: Delete "Delete Entities 2" | input = pard2(1) domains 2
    sph1: Sphere | r = 60
    wp1: WorkPlane | unite = on
    pard1: PartitionDomains | domain = sph1(1) domains 1; workplane = wp1
    del1: Delete "Delete Entities 1" | input = pard1(1) domains 1
    pc1: ParametricCurve "参数化曲线 1" | parmax = 2*pi; coord = {24.8*sin(s), 24.8*cos(s), 0}
    fin: Finalize "Form Union"

Materials
  mat1: Common "Water, liquid" on domains 1
    def "Basic"
      dynamicviscosity = eta(T[1/K])[Pa*s]
      ratioofspecificheat = 1.0
      electricconductivity = 5.5e-6[S/m]
      heatcapacity = Cp(T[1/K])[J/(kg*K)]
      density = rho(T[1/K])[kg/m^3]
      thermalconductivity = k(T[1/K])[W/(m*K)]
      soundspeed = cs(T[1/K])[m/s]
      eta: Piecewise
        arg = T
        pieces = 
          {273.15, 413.15, 1.3799566804-0.021224019151*T^1+1.3604562827E-4*T^2-4.6454090319E-7*T^3+8.9042735735E-10*T^4-9.0790692686E-13*T^5+3.8457331488E-16*T^6}
          {413.15, 553.75, 0.00401235783-2.10746715E-5*T^1+3.85772275E-8*T^2-2.39730284E-11*T^3}
      Cp: Piecewise | arg = T; pieces = {273.15, 553.75, 12010.1471-80.4072879*T^1+0.309866854*T^2-5.38186884E-4*T^3+3.62536437E-7*T^4}
      rho: Piecewise | arg = T; pieces = {273.15, 553.75, 838.466135+1.40050603*T^1-0.0030112376*T^2+3.71822313E-7*T^3}
      k: Piecewise | arg = T; pieces = {273.15, 553.75, -0.869083936+0.00894880345*T^1-1.58366345E-5*T^2+7.97543259E-9*T^3}
      cs: Interpolation | table = {{273, 1403}, {278, 1427}, {283, 1447}, {293, 1481}, {303, 1507}, {313, 1526}, {323, 1541}, {333, 1552}, {343, 1555}, {353, 1555}, {363, 1550}, {373, 1543}}; interp = piecewisecubic
  mat2: Common "Material 2" on domains 2
    def "Basic"
      poissonsratio = 0.41
      density = 1310
      youngsmodulus = 2.1e9

Physics
  acpr: PressureAcoustics "Pressure Acoustics, Frequency Domain" on domains 1
    dependent variable p
    fpam1: FrequencyPressureAcousticsModel "Pressure Acoustics 1" (default)
    shb1: SoundHard "Sound Hard Boundary (Wall) 1" (default)
    init1: init "Initial Values 1" (default)
    swr1: SphericalWaveRadiation on boundaries 1, 3, 12, 13
  solid: SolidMechanics on domains 2
    dependent variable u = {u, v, w}
    lemm1: LinearElasticModel "Linear Elastic Material 1" (default)
    free1: Free (default)
    init1: init "Initial Values 1" (default)
    bndl1: BoundaryLoad on boundaries 8 | LoadType = FollowerPressure; FollowerPressure = 50000

Multiphysics
  asb1: AcousticStructureBoundary on all boundaries | Acoustics_physics = acpr; Structure_physics = solid

Mesh
  mesh1 "Mesh 1"
    size: MeshSizeDefault | hauto = 1
    ftet2: FreeTet "Free Tetrahedral 2" on remaining entities | optcurved = on

Studies
  std1 "Study 1"
    freq: Frequency "Frequency Domain" | punit = kHz; plist = 200

Solver configurations
  sol1 "Solution 1" (study std1)
    v1: Variables "因变量 1"
    s1: Stationary "稳态求解器 1"
      p1: Parametric "参数化 1" | pname = freq; plistarr = 200; punit = kHz; pcontinuationmode = no
      fc1: FullyCoupled "全耦合 1" | linsolver = d1
      d1: Direct "直接 1"

Datasets
  dset1: Solution | solution = sol1

Plots
  pg1: PlotGroup3D "Acoustic Pressure (acpr)" | data = dset1
    surf1: Surface | expr = acpr.p_t
    slc1: Slice | expr = acpr.p_t; descr = 总声压场; quickplane = xy; quickzmethod = coord; quickz = 12
  pg2: PlotGroup3D "Sound Pressure Level (acpr)" | data = dset1
    surf1: Surface | expr = acpr.Lp
  pg3: PlotGroup3D "Acoustic Pressure, Isosurfaces (acpr)" | data = dset1
    iso1: Isosurface | expr = acpr.p_t
  pg4: PlotGroup3D "Stress (solid)" | data = dset1
    surf1: Surface | expr = solid.mises
      def: Deform "Deformation" | expr = {u, v, w}; descr = Displacement field